// COMSOL Multiphysics 5.5.0.359 model "验证.mph"
// Outline of the model tree

Geometry
  geom1 "几何 1" (1D, length unit m)
    i1: Interval "线段间隔 1" | coord = 0, 1
    fin: Finalize "形成联合体"

Physics
  g: GeneralFormPDE "一般形式偏微分方程" (disabled) on all domains
    dependent variable u
    Units.SourceTermQuantity = none
    Units.CustomSourceTermUnit = 1
    gfeq1: GeneralFormPDE "一般形式偏微分方程 1" (default)
      f = -exp(x[1/m])*(cos(x[1/m])-2*sin(x[1/m])-x*cos(x[1/m])-x*sin(x[1/m]))[1/m]
      Ga = -exp(x[1/m])*d(u,x)[m^2]
      da = 0
    zflx1: ZeroFluxBoundary "零通量 1" (default)
    init1: init "初始值 1" (default)
    cons1: Constraint "约束 1" on boundaries 1
    cons2: Constraint "约束 2" on boundaries 2 | R = cos(1)
  c: CoefficientFormPDE "系数形式偏微分方程" on all domains
    dependent variable u2
    ShapeProperty.order = 1
    Units.CustomSourceTermUnit = 1
    cfeq1: CoefficientFormPDE "系数形式偏微分方程 1" (default)
      c = exp(x[1/m])
      f = -exp(x[1/m])*(cos(x[1/m])-2*sin(x[1/m])-x*cos(x[1/m])-x*sin(x[1/m]))[1/m]
      da = 0
    zflx1: ZeroFluxBoundary "零通量 1" (default)
    init1: init "初始值 1" (default)
    dir1: DirichletBoundary "狄利克雷边界条件 1" on boundaries 1 | r = 0
    dir2: DirichletBoundary "狄利克雷边界条件 2" on boundaries 2 | r = cos(1)

Mesh
  mesh1 "网格 1"
    size: MeshSizeDefault "大小" | hmax = 1/8; hgrad = 1; custom = on
    edg1: Edge "边 1" on remaining entities

Studies
  std1 "研究 1"
    stat: Stationary "稳态"

Solver configurations
  sol1 "解 1" (study std1)
    v1: Variables "因变量 1"
    s1: Stationary "稳态求解器 1" | stol = 0.01
      dDef: Direct "直接" | errorchk = on
      fc1: FullyCoupled "全耦合 1" | linsolver = dDef
    a1: Assemble "组装 1" | L = on; K = on; D = on; E = on; M = on; N = on; NF = on

Datasets
  dset1: Solution | solution = sol1

Derived values
  sys1: SystemMatrix "系统矩阵 1" | table = tbl1; solution = sol1; format = filled
  sys2: SystemMatrix "系统矩阵 2" | table = tbl2; solution = sol1; matrixassem = load; format = filled

Tables
  tbl1: Table "表格 1"
    // 系统矩阵: 系统矩阵 1 {sys1}
     |  |  |  |  |  |  |  | 
    8.5215 | -8.5215 | 0 | 0 | 0 | 0 | 0 | 0 | 0
    -8.5215 | 18.1776 | -9.65613 | 0 | 0 | 0 | 0 | 0 | 0
    0 | -9.65613 | 20.5979 | -10.9418 | 0 | 0 | 0 | 0 | 0
    0 | 0 | -10.9418 | 23.3405 | -12.3987 | 0 | 0 | 0 | 0
    0 | 0 | 0 | -12.3987 | 26.4483 | -14.0496 | 0 | 0 | 0
    0 | 0 | 0 | 0 | -14.0496 | 29.9698 | -15.9203 | 0 | 0
    0 | 0 | 0 | 0 | 0 | -15.9203 | 33.9603 | -18.04 | 0
    0 | 0 | 0 | 0 | 0 | 0 | -18.04 | 38.482 | -20.442
    0 | 0 | 0 | 0 | 0 | 0 | 0 | -20.442 | 20.442
  tbl2: Table "表格 2"
    // 系统矩阵: 系统矩阵 2 {sys2}
    
    1.01084
    -4.44089e-16
    -2.22045e-16
    -9.4369e-16
    0.807844

Plots
  pg1: PlotGroup1D "一维绘图组 1" | data = dset1
    lngr1: LineGraph "线图 1" on all domains | data = dset1; expr = u2; xdata = expr; xdataexpr = x